// SBML level 3 version 2

model Clk1_Config1()
  // Clk-1 Network Configuration 1 ODE Model
  // model units - time: dimensionless, extent: dimensionless

  // Compartments:
  compartment cell = 1;

  // Species:
  species clk1 in cell = 1;
  species ETC in cell = 1;
  species pink1 in cell = 1;
  species skn1 in cell = 1;
  species taf4 in cell = 1;
  species met in cell = 1;
  species hlh11 in cell = 1;
  species unc51 in cell = 1;
  species hlh30 in cell = 1;
  species creb in cell = 1;
  species UP in cell = 1;
  species ATG in cell = 1;
  species lipl4 in cell = 1;
  species MTG in cell = 1;
  species fzo1 in cell = 1;
  species clpp1 in cell = 1;
  species LDs in cell = 1;
  species ETC2 in cell = 1;
  species atfs1 in cell = 1;
  species ros in cell = 1;
  species hsp60 in cell = 1;
  species hif1 in cell = 1;
  species atgl1 in cell = 1;
  species lip in cell = 1;
  species betaox in cell = 1;
  species ATP in cell = 1;
  species crtc1 in cell = 1;
  species mtor in cell = 1;
  species ampk in cell = 1;

  // Parameters:
  h = 20;
  b = 0.5;
  alphaclk1 = 1;
  alphaETC = 1;
  alphapink1 = 1;
  alphaskn1 = 1;
  alphataf4 = 1;
  alphamet = 1;
  alphahlh11 = 1;
  alphaunc51 = 1;
  alphahlh30 = 1;
  alphacreb = 1;
  alphaUP = 1;
  alphaATG = 1;
  alphalipl4 = 1;
  alphaMTG = 1;
  alphafzo1 = 1;
  alphaclpp1 = 1;
  alphaLDs = 1;
  alphaETC2 = 1;
  alphaatfs1 = 1;
  alpharos = 1;
  alphahsp60 = 1;
  alphahif1 = 1;
  alphaatgl1 = 1;
  alphalip = 1;
  alphabetaox = 1;
  alphaATP = 1;
  alphacrtc1 = 1;
  alphamtor = 1;
  alphaampk = 1;

  // Assignment rules:
  w_clk1 := 0;
  w_ETC := clk1;
  w_pink1 := 1 - ETC;
  w_skn1 := max(min(1 - ETC, 1 - ros), min(ETC, 1 - ros), min(ETC, ros));
  w_taf4 := 1 - clk1;
  w_met := 1 - hif1;
  w_hlh11 := min(1 - atfs1, 1 - mtor);
  w_unc51 := min(mtor, 1 - ampk);
  w_hlh30 := 1 - mtor;
  w_creb := min(1 - taf4, crtc1);
  w_UP := max(min(1 - clk1, 1 - ETC2, 1 - hsp60), min(1 - clk1, ETC2, 1 - hsp60), min(clk1, ETC2, 1 - hsp60));
  w_ATG := min(unc51, hlh30);
  w_lipl4 := hlh30;
  w_MTG := min(pink1, skn1, unc51);
  w_fzo1 := creb;
  w_clpp1 := UP;
  w_LDs := ATG;
  w_ETC2 := min(MTG, fzo1);
  w_atfs1 := clpp1;
  w_ros := max(min(1 - clk1, 1 - ETC2, 1 - ampk), min(1 - clk1, ETC2, 1 - ampk), min(clk1, ETC2, 1 - ampk), min(1 - clk1, ETC2, ampk), min(clk1, ETC2, ampk));
  w_hsp60 := atfs1;
  w_hif1 := ros;
  w_atgl1 := 1 - hlh11;
  w_lip := min(lipl4, LDs, atgl1);
  w_betaox := lip;
  w_ATP := max(min(ETC, ETC2, 1 - betaox), min(1 - ETC, 1 - ETC2, betaox), min(ETC, 1 - ETC2, betaox), min(1 - ETC, ETC2, betaox), min(ETC, ETC2, betaox));
  w_crtc1 := 1 - ampk;
  w_mtor := min(1 - unc51, 1 - ampk);
  w_ampk := max(min(1 - ros, 1 - hif1, 1 - ATP), min(1 - ros, hif1, 1 - ATP), min(1 - ros, 1 - hif1, ATP), min(ros, 1 - hif1, ATP), min(1 - ros, hif1, ATP));

  // Rate rules:
  clk1' = (-exp(0.5*h) + exp(-(h*w_clk1)))/((1 - exp(0.5*h))*(1 + exp(-(h*(w_clk1 - 0.5))))) - alphaclk1*clk1;
  ETC' = (-exp(0.5*h) + exp(-(h*w_ETC)))/((1 - exp(0.5*h))*(1 + exp(-(h*(w_ETC - 0.5))))) - alphaETC*ETC;
  pink1' = (-exp(0.5*h) + exp(-(h*w_pink1)))/((1 - exp(0.5*h))*(1 + exp(-(h*(w_pink1 - 0.5))))) - alphapink1*pink1;
  skn1' = (-exp(0.5*h) + exp(-(h*w_skn1)))/((1 - exp(0.5*h))*(1 + exp(-(h*(w_skn1 - 0.5))))) - alphaskn1*skn1;
  taf4' = (-exp(0.5*h) + exp(-(h*w_taf4)))/((1 - exp(0.5*h))*(1 + exp(-(h*(w_taf4 - 0.5))))) - alphataf4*taf4;
  met' = (-exp(0.5*h) + exp(-(h*w_met)))/((1 - exp(0.5*h))*(1 + exp(-(h*(w_met - 0.5))))) - alphamet*met;
  hlh11' = (-exp(0.5*h) + exp(-(h*w_hlh11)))/((1 - exp(0.5*h))*(1 + exp(-(h*(w_hlh11 - 0.5))))) - alphahlh11*hlh11;
  unc51' = (-exp(0.5*h) + exp(-(h*w_unc51)))/((1 - exp(0.5*h))*(1 + exp(-(h*(w_unc51 - 0.5))))) - alphaunc51*unc51;
  hlh30' = (-exp(0.5*h) + exp(-(h*w_hlh30)))/((1 - exp(0.5*h))*(1 + exp(-(h*(w_hlh30 - 0.5))))) - alphahlh30*hlh30;
  creb' = (-exp(0.5*h) + exp(-(h*w_creb)))/((1 - exp(0.5*h))*(1 + exp(-(h*(w_creb - 0.5))))) - alphacreb*creb;
  UP' = (-exp(0.5*h) + exp(-(h*w_UP)))/((1 - exp(0.5*h))*(1 + exp(-(h*(w_UP - 0.5))))) - alphaUP*UP;
  ATG' = (-exp(0.5*h) + exp(-(h*w_ATG)))/((1 - exp(0.5*h))*(1 + exp(-(h*(w_ATG - 0.5))))) - alphaATG*ATG;
  lipl4' = (-exp(0.5*h) + exp(-(h*w_lipl4)))/((1 - exp(0.5*h))*(1 + exp(-(h*(w_lipl4 - 0.5))))) - alphalipl4*lipl4;
  MTG' = (-exp(0.5*h) + exp(-(h*w_MTG)))/((1 - exp(0.5*h))*(1 + exp(-(h*(w_MTG - 0.5))))) - alphaMTG*MTG;
  fzo1' = (-exp(0.5*h) + exp(-(h*w_fzo1)))/((1 - exp(0.5*h))*(1 + exp(-(h*(w_fzo1 - 0.5))))) - alphafzo1*fzo1;
  clpp1' = (-exp(0.5*h) + exp(-(h*w_clpp1)))/((1 - exp(0.5*h))*(1 + exp(-(h*(w_clpp1 - 0.5))))) - alphaclpp1*clpp1;
  LDs' = (-exp(0.5*h) + exp(-(h*w_LDs)))/((1 - exp(0.5*h))*(1 + exp(-(h*(w_LDs - 0.5))))) - alphaLDs*LDs;
  ETC2' = (-exp(0.5*h) + exp(-(h*w_ETC2)))/((1 - exp(0.5*h))*(1 + exp(-(h*(w_ETC2 - 0.5))))) - alphaETC2*ETC2;
  atfs1' = (-exp(0.5*h) + exp(-(h*w_atfs1)))/((1 - exp(0.5*h))*(1 + exp(-(h*(w_atfs1 - 0.5))))) - alphaatfs1*atfs1;
  ros' = (-exp(0.5*h) + exp(-(h*w_ros)))/((1 - exp(0.5*h))*(1 + exp(-(h*(w_ros - 0.5))))) - alpharos*ros;
  hsp60' = (-exp(0.5*h) + exp(-(h*w_hsp60)))/((1 - exp(0.5*h))*(1 + exp(-(h*(w_hsp60 - 0.5))))) - alphahsp60*hsp60;
  hif1' = (-exp(0.5*h) + exp(-(h*w_hif1)))/((1 - exp(0.5*h))*(1 + exp(-(h*(w_hif1 - 0.5))))) - alphahif1*hif1;
  atgl1' = (-exp(0.5*h) + exp(-(h*w_atgl1)))/((1 - exp(0.5*h))*(1 + exp(-(h*(w_atgl1 - 0.5))))) - alphaatgl1*atgl1;
  lip' = (-exp(0.5*h) + exp(-(h*w_lip)))/((1 - exp(0.5*h))*(1 + exp(-(h*(w_lip - 0.5))))) - alphalip*lip;
  betaox' = (-exp(0.5*h) + exp(-(h*w_betaox)))/((1 - exp(0.5*h))*(1 + exp(-(h*(w_betaox - 0.5))))) - alphabetaox*betaox;
  ATP' = (-exp(0.5*h) + exp(-(h*w_ATP)))/((1 - exp(0.5*h))*(1 + exp(-(h*(w_ATP - 0.5))))) - alphaATP*ATP;
  crtc1' = (-exp(0.5*h) + exp(-(h*w_crtc1)))/((1 - exp(0.5*h))*(1 + exp(-(h*(w_crtc1 - 0.5))))) - alphacrtc1*crtc1;
  mtor' = (-exp(0.5*h) + exp(-(h*w_mtor)))/((1 - exp(0.5*h))*(1 + exp(-(h*(w_mtor - 0.5))))) - alphamtor*mtor;
  ampk' = (-exp(0.5*h) + exp(-(h*w_ampk)))/((1 - exp(0.5*h))*(1 + exp(-(h*(w_ampk - 0.5))))) - alphaampk*ampk;
end
